#ifmissing "123.glm"
#model get IEEE/123
#endif
#include "123.glm"

// Task 1 - Set the clock
clock
{
    timezone GMT-6;               //  in Phoenix, Arizona
    starttime "2020-01-01 12:00:00 MST";
    stoptime "2021-01-01 12:00:00 MST";
}

// Task 2 - Load weather data
#ifmissing "AZ-Deer_Valley_Phoenix.glm"
#weather get AZ-Deer_Valley_Phoenix                   // Why no file extension?
#endif
#input "AZ-Deer_Valley_Phoenix.tmy3"

#output "IEEE-123-voltage-profile.png" -t profile -l 10
